*Heading
** Job name: HertzContact Model name: Model-1
** Generated by: Abaqus/CAE 6.10-1
*Preprint, echo=NO, model=NO, history=NO, contact=NO
**
** PARTS
**
*Part, name=Ball
*Node
      1,           0.,           0.
      2,           0.,          10.
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*Element, type=CAX3
1, 127, 147,  93
2, 183, 161, 166
3, 182, 263, 239
4, 158, 184, 157
*Element, type=CAX4R
  5, 150, 152, 103, 101
  6,  79,  90,  27,  26
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*Nset, nset=_PickedSet2, internal, generate
   1,  263,    1
*Elset, elset=_PickedSet2, internal, generate
   1,  231,    1
** Section: steel-section
*Solid Section, elset=_PickedSet2, material=Steel
,
*End Part
**
*Part, name=Base
*Node
      1,           0.,         -10.
      2,           0.,           0.
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*Element, type=CAX3
1, 194, 306, 230
2, 276, 261, 239
3, 277, 276, 226
4, 285, 260, 272
5, 303, 288, 258
6, 287, 260, 288
7, 263, 255, 244
8, 289, 243, 286
*Element, type=CAX4R
  9,  68,  67, 110, 111
 10,   1,  35, 291,   5
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*Nset, nset=_PickedSet2, internal, generate
   1,  310,    1
*Elset, elset=_PickedSet2, internal, generate
   1,  276,    1
** Section: steel-section
*Solid Section, elset=_PickedSet2, material=Steel
,
*End Part
**
**
** ASSEMBLY
**
*Assembly, name=Assembly
**
*Instance, name=Ball-1, part=Ball
*End Instance
**
*Instance, name=Base-1, part=Base
*End Instance
**
*Node
      1,           0.,          10.,           0.
*Nset, nset=_PickedSet8, internal, instance=Base-1
  1,  3, 27, 28, 29, 30, 31, 32, 33, 34, 35
*Elset, elset=_PickedSet8, internal, instance=Base-1
 10, 12, 32, 34, 37, 38, 40, 92, 94, 96
*Nset, nset=_PickedSet9, internal, instance=Ball-1
  1,  2, 14, 15, 16, 17
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*Nset, nset=_PickedSet9, internal, instance=Base-1
  1,  2,  5,  6,  7,  8
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*Elset, elset=_PickedSet9, internal, instance=Ball-1
   6,   8,   9,  14,  16,  26
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*Elset, elset=_PickedSet9, internal, instance=Base-1
 10, 11, 13, 15, 16, 17
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*Nset, nset=_PickedSet12, internal
 1,
*Nset, nset=_PickedSet13, internal
 1,
*Elset, elset=__PickedSurf6_S1, internal, instance=Base-1
   9,  41,  43,  46,  57,  68
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*Elset, elset=__PickedSurf6_S3, internal, instance=Base-1
  14,  73,  75,  76,  79,  80,  82,  84,  88,  91, 119, 120, 121, 141, 145, 155
*Elset, elset=__PickedSurf6_S4, internal, instance=Base-1
 74,
*Surface, type=ELEMENT, name=_PickedSurf6, internal
__PickedSurf6_S1, S1
__PickedSurf6_S3, S3
__PickedSurf6_S4, S4
*Elset, elset=__PickedSurf7_S4, internal, instance=Ball-1
  7, 12, 13, 15, 18, 20, 25, 32, 38, 41, 42, 47, 49, 50, 57
*Elset, elset=__PickedSurf7_S2, internal, instance=Ball-1
  16,  17,  19,  23,  27,  37
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*Surface, type=ELEMENT, name=_PickedSurf7, internal
__PickedSurf7_S4, S4
__PickedSurf7_S2, S2
*Elset, elset=__PickedSurf11_S1, internal, instance=Ball-1
 15, 62, 81
*Elset, elset=__PickedSurf11_S4, internal, instance=Ball-1
 33, 53, 64
*Elset, elset=__PickedSurf11_S2, internal, instance=Ball-1
 63,
*Surface, type=ELEMENT, name=_PickedSurf11, internal
__PickedSurf11_S1, S1
__PickedSurf11_S4, S4
__PickedSurf11_S2, S2
** Constraint: Constraint-1
*Coupling, constraint name=Constraint-1, ref node=_PickedSet12, surface=_PickedSurf11
*Distributing, weighting method=UNIFORM
*End Assembly
**
** MATERIALS
**
*Material, name=Steel
*Density
 7.9e-09,
*Elastic
210000., 0.3
**
** INTERACTION PROPERTIES
**
*Surface Interaction, name=IntProp-1
1.,
*Friction
0.,
*Surface Behavior, pressure-overclosure=HARD
*Time Points, name=TimePoints-1
0.05, 0.1, 0.2, 0.4, 0.6, 0.8, 1.
**
** BOUNDARY CONDITIONS
**
** Name: BC-1 Type: Displacement/Rotation
*Boundary
_PickedSet8, 2, 2
** Name: BC-2 Type: Symmetry/Antisymmetry/Encastre
*Boundary
_PickedSet9, YASYMM
**
** INTERACTIONS
**
** Interaction: Int-1
*Contact Pair, interaction=IntProp-1, type=SURFACE TO SURFACE, adjust=0.0
_PickedSurf7, _PickedSurf6
** ----------------------------------------------------------------
**
** STEP: Contact
**
*Step, name=Contact, inc=1000
*Static
0.01, 1., 1e-05, 0.3
**
** LOADS
**
** Name: Load-1   Type: Concentrated force
*Cload
_PickedSet13, 2, -300.
**
** OUTPUT REQUESTS
**
*Restart, write, frequency=0
**
** FIELD OUTPUT: F-Output-1
**
*Output, field, variable=PRESELECT, time points=TimePoints-1, time marks=NO
**
** HISTORY OUTPUT: H-Output-1
**
*Output, history, variable=PRESELECT
*End Step
