*Heading
** Job name: myJob Model name: myModel
** Generated by: Abaqus/CAE 6.10-1
*Preprint, echo=NO, model=NO, history=NO, contact=NO
**
** PARTS
**
*Part, name=Part-1
*Node
      1,          15.,           0.,          20.
      2,         13.5,           0.,          20.
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*Element, type=C3D8R
   1,  155,  156,  167,  166,    1,    2,   13,   12
   2,  156,  157,  168,  167,    2,    3,   14,   13
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*Nset, nset=_PickedSet2, internal, generate
    1,  1694,     1
*Elset, elset=_PickedSet2, internal, generate
    1,  1300,     1
** Section: Section-Steel
*Solid Section, elset=_PickedSet2, material=Steel
,
*End Part
**
*Part, name=Part-2
*Node
      1,           5.,          15.,           0.
      2,   6.42857122,          15.,           0.
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*Element, type=C3D8R
  1,   9,  10,   2,   1,  97,  98,  90,  89
  2,  10,  11,   3,   2,  98,  99,  91,  90
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*Nset, nset=_PickedSet2, internal, generate
   1,  968,    1
*Elset, elset=_PickedSet2, internal, generate
   1,  700,    1
** Section: Section-Steel
*Solid Section, elset=_PickedSet2, material=Steel
,
*End Part
**
**
** ASSEMBLY
**
*Assembly, name=Assembly
**
*Instance, name=Part-1-1, part=Part-1
          0.,          15.,           0.
*End Instance
**
*Instance, name=Part-1-2, part=Part-1
          0.,         -15.,           0.
*End Instance
**
*Instance, name=Part-2-1, part=Part-2
*End Instance
**
*Nset, nset=setX, instance=Part-1-1, generate
   11,  1694,    11
*Nset, nset=setX, instance=Part-1-2, generate
   11,  1694,    11
*Nset, nset=setX, instance=Part-2-1, generate
 881,  968,    1
*Elset, elset=setX, instance=Part-1-1, generate
   10,  1300,    10
*Elset, elset=setX, instance=Part-1-2, generate
   10,  1300,    10
*Elset, elset=setX, instance=Part-2-1, generate
 631,  700,    1
*Nset, nset=setZ, instance=Part-1-1
  144,  145,  146,  147,  148,  149
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*Nset, nset=setZ, instance=Part-1-2
  144,  145,  146,  147,  148,  149
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*Nset, nset=setZ, instance=Part-2-1, generate
  1,  88,   1
*Elset, elset=setZ, instance=Part-1-1
  121,  122,  123,  124,  125,  126
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*Elset, elset=setZ, instance=Part-1-2
  121,  122,  123,  124,  125,  126
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*Elset, elset=setZ, instance=Part-2-1, generate
  1,  70,   1
*Nset, nset=_PickedSet10, internal, instance=Part-1-1, generate
   11,  1694,    11
*Nset, nset=_PickedSet10, internal, instance=Part-1-2, generate
   11,  1694,    11
*Nset, nset=_PickedSet10, internal, instance=Part-2-1, generate
 881,  968,    1
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*Nset, nset=_PickedSet11, internal, instance=Part-1-1
  144,  145,  146,  147,  148,  149
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*Nset, nset=_PickedSet11, internal, instance=Part-1-2
  144,  145,  146,  147,  148,  149
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*Nset, nset=_PickedSet11, internal, instance=Part-2-1, generate
  1,  88,   1
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*Nset, nset=_PickedSet12, internal, instance=Part-1-2, generate
   1,  154,    1
*Elset, elset=_PickedSet12, internal, instance=Part-1-2, generate
   1,  130,    1
*Elset, elset=_surfaceX_S4, internal, instance=Part-1-1, generate
   10,  1300,    10
*Elset, elset=_surfaceX_S4, internal, instance=Part-1-2, generate
   10,  1300,    10
*Elset, elset=_surfaceX_S2, internal, instance=Part-2-1, generate
 631,  700,    1
*Surface, type=ELEMENT, name=surfaceX
_surfaceX_S4, S4
_surfaceX_S2, S2
*Elset, elset=__PickedSurf13_S1, internal, instance=Part-1-1, generate
 1171,  1300,     1
*Surface, type=ELEMENT, name=_PickedSurf13, internal
__PickedSurf13_S1, S1
*Elset, elset=__Int-1_gcs0_13_S4, internal, instance=Part-2-1, generate
   7,  700,    7
*Surface, type=ELEMENT, name=_Int-1_gcs0_13, internal
__Int-1_gcs0_13_S4, S4
*Elset, elset=__Int-1_gcs0_15_S6, internal, instance=Part-2-1, generate
   1,  694,    7
*Surface, type=ELEMENT, name=_Int-1_gcs0_15, internal
__Int-1_gcs0_15_S6, S6
*End Assembly
**
** MATERIALS
**
*Material, name=Steel
*Density
 7.8e-09,
*Elastic
210000., 0.28
*Expansion
 1e-05,
*Plastic
450.,   0.
480., 0.05
490., 0.15
500.,  0.3
**
** INTERACTION PROPERTIES
**
*Surface Interaction, name=IntProp-1
1.,
*Friction
0.,
**
** BOUNDARY CONDITIONS
**
** Name: BC-X Type: Symmetry/Antisymmetry/Encastre
*Boundary
_PickedSet10, XSYMM
** Name: BC-YFix Type: Displacement/Rotation
*Boundary
_PickedSet12, 2, 2
** Name: BC-Z Type: Symmetry/Antisymmetry/Encastre
*Boundary
_PickedSet11, ZSYMM
**
** INTERACTIONS
**
** Interaction: Int-1
*Contact
*Contact Inclusions, ALL EXTERIOR
*Contact Property Assignment
 ,  , IntProp-1
*Surface Property Assignment, property=GEOMETRIC CORRECTION
_Int-1_gcs0_13, Circumferential, 0., 7.5, 0.,  0., 6.5, 0.
_Int-1_gcs0_15, Circumferential, 0., 7.5, 0.,  0., 6.5, 0.
** ----------------------------------------------------------------
**
** STEP: myStep1
**
*Step, name=myStep1, nlgeom=YES, inc=1000
*Static
0.1, 1., 0.001, 0.3
**
** LOADS
**
** Name: Pressure   Type: Pressure
*Dsload
_PickedSurf13, P, 10.
**
** OUTPUT REQUESTS
**
*Restart, write, frequency=0
**
** FIELD OUTPUT: F-Output-1
**
*Output, field, number interval=10
*Node Output
U,
*Element Output, directions=YES
S,
**
** HISTORY OUTPUT: H-Output-1
**
*Output, history, variable=PRESELECT
*End Step
