*Heading
** Generated by: Abaqus/CAE 6.10-1
*Preprint, echo=NO, model=NO, history=NO, contact=NO
**
** PARTS
**
*Part, name=wire
*Node
      1,           0.,  0.109809168
      2, 0.00285961363,  0.109809168
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*Element, type=CAX4R
   1,    1,    2,   19,   18
   2,    2,    3,   20,   19
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*Nset, nset=_PickedSet2, internal, generate
    1,  2737,     1
*Elset, elset=_PickedSet2, internal, generate
    1,  2560,     1
** Section: steel
*Solid Section, elset=_PickedSet2, material=steel
,
*End Part
**
**
** ASSEMBLY
**
*Assembly, name=Assembly
**
*Instance, name=wire-1, part=wire
*End Instance
**
*Nset, nset=axi, instance=wire-1, generate
    1,  2721,    17
*Elset, elset=axi, instance=wire-1, generate
    1,  2545,    16
*Nset, nset=wire_fix, instance=wire-1, generate
 2721,  2737,     1
*Elset, elset=wire_fix, instance=wire-1, generate
 2545,  2560,     1
*Nset, nset=wire_move, instance=wire-1, generate
  1,  17,   1
*Elset, elset=wire_move, instance=wire-1, generate
  1,  16,   1
*End Assembly
*Map solution
0.0,12.0,0.0
**
** MATERIALS
**
*Material, name=steel
*Density
 7.86e-09,
*Elastic
204323., 0.3
*Plastic
 697.155,     0.
 831.357, 0.0034
 888.665, 0.0068
 932.946, 0.0102
 970.444, 0.0136
 1003.59,  0.017
 1033.63, 0.0204
 1061.32, 0.0238
 1087.14, 0.0272
 1111.44, 0.0306
 1134.44,  0.034
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 3032.47,     4.
**
** BOUNDARY CONDITIONS
**
** Name: axi Type: Displacement/Rotation
*Boundary
axi, 1, 1
** Name: wire_fix Type: Displacement/Rotation
*Boundary
wire_fix, 2, 2
** ----------------------------------------------------------------
**
** STEP: tension
**
*Step, name=tension, nlgeom=YES, inc=1000
*Static
0.000114385, 0.0114385, 1e-10, 0.000114385
**
** BOUNDARY CONDITIONS
**
** Name: wire_move Type: Velocity/Angular velocity
*Boundary, type=VELOCITY
wire_move, 2, 2, -2.
**
** OUTPUT REQUESTS
**
*Restart, write, frequency=0
**
** FIELD OUTPUT: F-Output-1
**
*Output, field, variable=PRESELECT
**
** HISTORY OUTPUT: H-Output-1
**
*Output, history, variable=PRESELECT
*End Step
